# Crear sistema
#Modelo de patchy particles con bonds armonicos.

log none

#Inicializacion
units lj
boundary p p p
atom_style full
newton on

#Crear caja de simulacion
variable L equal 21

region sim_box block -$L $L -$L $L -$L $L
create_box 4 sim_box &
    bond/types 1 &
    angle/types 2 &
    extra/bond/per/atom 10 &
    extra/angle/per/atom 6 &
    extra/special/per/atom 10

#Tipos de atomos
mass 1 1.0 #Monomer
mass 2 0.01 #Patches
mass 3 1.0 #Xlinker
mass 4 0.01 #Xlinker patches

#Interacciones
pair_style hybrid/overlay lj/cut 1.122462 sw threebody off threebody/table
pair_coeff * * threebody/table ../input_data/threebody.3b NULL Mon NULL Xl
pair_coeff 2 4 sw ../input_data/patches.sw NULL Mon NULL Xl
pair_coeff 2 2 sw ../input_data/patches.sw NULL Mon NULL Xl
pair_coeff 4 4 none
pair_coeff 1 1 lj/cut 1.0 1.0
pair_coeff 1 2 none
pair_coeff 1 3 lj/cut 1.0 1.0
pair_coeff 2 3 none
pair_coeff 3 3 lj/cut 1.0 1.0
pair_coeff 3 4 none
pair_coeff 1 4 none

#Bonds y angle para inicializar moleculas. Se tratan como cuerpos rigidos durante la simulacion
bond_style harmonic
bond_coeff 1 100.0 0.361231024154685

angle_style harmonic
angle_coeff 1 100.0 180
angle_coeff 2 100.0 109.4712

#Spawn de moleculas
region spawn_box block -$L $L -$L $L -$L $L

molecule 1 ../input_data/monomer.mol
molecule 2 ../input_data/xlinker.mol

create_atoms 0 random 600 118394 spawn_box mol 2 734587 overlap 1.13 maxtry 5000
create_atoms 0 random 8000 118394 spawn_box mol 1 884923 overlap 1.13 maxtry 5000

#grupos
group patches type 2 4

#Compute potential energy
compute pot_ene all pe

#Visualizacion
dump mydmp all atom 10000 ../../Results/SizeExperiment/dump_formation_v2.lammpstrj
dump_modify mydmp scale no
thermo 10000

#Minimizar energia.
minimize 1.0e-4 1.0e-6 1000 100000

fix mynve all nve #Dinamica NVE
fix save_pot_ene all ave/time 1 1 10000 c_pot_ene file ../output_data/self_assembly/pot_ene_v2.dat #Guardar info de energia

timestep 0.002

#Percolation_fun de python
variable check_percolation python percolation
python percolation return v_check_percolation format i file percolation_fun.py

#subir temperatura
fix thermostat all langevin 0.0 0.05 0.5 234798
run 500000 start 0

#formar
fix thermostat all langevin 0.05 0.05 0.5 402438
label formation_loop
run 100000 start 0
write_data system_check.data
print ${check_percolation}
if "${check_percolation} == 1" then "jump SELF bajar_temp" else "jump SELF formation_loop" #Cuando percole salir del loop

#Bajar temperatura
label bajar_temp
fix thermostat all langevin 0.05 0.0 0.5 820394
run 500000 start 0

write_data ../../Results/SizeExperiment/2k_particles/system_v2_formation_2k_1.data
